*Heading
** Job name: Job-1 Model name: Model-1
** Generated by: Abaqus/CAE 6.14-2
*Preprint, echo=NO, model=NO, history=NO, contact=NO
**
** PARTS
**
*Part, name=Part-2
*Node
      1,           0.,           0.
      2, 0.0100049051,  5.00503156e-05
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*Element, type=R2D2
  1,   1,   2
  2,   2,   3
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*Node
    629,           0.,           1.,           0.
*Nset, nset=Part-2-RefPt_, internal
629,
*Elset, elset=Part-2, generate
   1,  628,    1
*End Part
**
*Part, name=solid
*Node
      1,          2.5,          -5.
      2,          2.5,           0.
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*Element, type=CPE4R
    1,     1,     9,   634,   404
    2,     9,    10,   635,   634
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*Element, type=CPE3
10001, 25140, 20192, 20178
10002, 21941, 20882, 20992
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*Nset, nset=_PickedSet2, internal, generate
     1,  25820,      1
*Elset, elset=_PickedSet2, internal, generate
     1,  25867,      1
** Section: Section-1
*Solid Section, elset=_PickedSet2, material=Material-1
1.,
*End Part
**
**
** ASSEMBLY
**
*Assembly, name=Assembly
**
*Instance, name=Part-2-1, part=Part-2
*End Instance
**
*Instance, name=solid-1, part=solid
*End Instance
**
*Nset, nset=Set-1, instance=Part-2-1
 629,
*Nset, nset=_PickedSet12, internal, instance=solid-1
   6,   7, 480, 481, 482, 483
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*Elset, elset=_PickedSet12, internal, instance=solid-1
 10476, 10477, 10478, 10479, 10480, 10481
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*Nset, nset=_PickedSet13, internal, instance=Part-2-1
 629,
*Elset, elset=__PickedSurf7_SNEG, internal, instance=Part-2-1, generate
   1,  628,    1
*Surface, type=ELEMENT, name=_PickedSurf7, internal
__PickedSurf7_SNEG, SNEG
*Elset, elset=__PickedSurf8_S2, internal, instance=solid-1, generate
   100,  10000,    100
*Surface, type=ELEMENT, name=_PickedSurf8, internal
__PickedSurf8_S2, S2
*Rigid Body, ref node=Part-2-1.Part-2-RefPt_, elset=Part-2-1.Part-2
*End Assembly
**
** MATERIALS
**
*Material, name=Material-1
*Depvar
      1,
*Elastic, dependencies=1
19., 0.4, ,  0.
 3., 0.4, ,  1.
*User Defined Field
**
** INTERACTION PROPERTIES
**
*Surface Interaction, name=IntProp-1
1.,
*Friction
0.,
*Surface Behavior, pressure-overclosure=HARD
**
** INTERACTIONS
**
** Interaction: Int-1
*Contact Pair, interaction=IntProp-1, type=SURFACE TO SURFACE
_PickedSurf8, _PickedSurf7
** ----------------------------------------------------------------
**
** STEP: Step-1
**
*Step, name=Step-1, nlgeom=NO
*Static
1., 1., 1e-05, 1.
**
** OUTPUT REQUESTS
**
*Restart, write, frequency=0
**
** FIELD OUTPUT: F-Output-1
**
*Output, field
*Node Output
CF, RF, U
*Element Output, directions=YES
FV, LE, PE, PEEQ, PEMAG, S
*Contact Output
CDISP, CSTRESS
**
** HISTORY OUTPUT: H-Output-1
**
*Output, history, variable=PRESELECT
*End Step
** ----------------------------------------------------------------
**
** STEP: Step-2
**
*Step, name=Step-2, nlgeom=NO
*Static
1., 1., 1e-05, 1.
**
** BOUNDARY CONDITIONS
**
** Name: BC-1 Type: Symmetry/Antisymmetry/Encastre
*Boundary
_PickedSet12, ENCASTRE
** Name: BC-2 Type: Displacement/Rotation
*Boundary
_PickedSet13, 1, 1
_PickedSet13, 2, 2, -0.0625
_PickedSet13, 6, 6
**
** OUTPUT REQUESTS
**
*Restart, write, frequency=0
**
** FIELD OUTPUT: F-Output-1
**
*Output, field
*Node Output
CF, RF, U
*Element Output, directions=YES
FV, LE, PE, PEEQ, PEMAG, S
*Contact Output
CDISP, CSTRESS
**
** HISTORY OUTPUT: H-Output-2
**
*Output, history
*Node Output, nset=Set-1
RF2,
*Node PRINT, nset=Set-1, SUMMARY=NO
RF2
**
** HISTORY OUTPUT: H-Output-1
**
*Output, history, variable=PRESELECT
*End Step
