*Heading
** Job name: Job-Validation Model name: Model-Ref
** Generated by: Abaqus/CAE 2019
*Preprint, echo=NO, model=NO, history=NO, contact=NO
**
** PARTS
**
*Part, name=Part-1
*Node
      1,           0.,           0., 0.00791000016
      2,           0.,           0., 0.0158200003
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*Element, type=C3D8R
   1,  117,  675, 1906,  577,    1,   22,  367,   65
   2,  675,  676, 1907, 1906,   22,   23,  368,  367
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*Nset, nset=_PickedSet2, internal, generate
    1,  3795,     1
*Elset, elset=_PickedSet2, internal, generate
    1,  3072,     1
** Section: Section-1
*Solid Section, elset=_PickedSet2, material=Material-Ref
,
*End Part
**
*Part, name=Part-3
*Node
      1,           0., 0.00382267055,           0.
      2,           0.,           0.,           0.
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*Element, type=R3D4
  1,   1,   8,  89,  55
  2,   8,   9,  90,  89
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*Node
    305,           0., 0.00249999994,           0.
*Nset, nset=Part-3-RefPt_, internal
305,
*Elset, elset=Part-3, generate
   1,  273,    1
*End Part
**
*Part, name=die
*Node
      1,           0., -0.0120000001, -0.00499999989
      2,           0., -0.0116999997, -0.00499999989
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*Element, type=R3D4
   1,    1,    2,   88,   87
   2,    2,    3,   89,   88
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*Node
   2323, 0.00353553379, 0.0135000004, -0.00353553379
*Nset, nset=die-RefPt_, internal
2323,
*Elset, elset=die, generate
    1,  2210,     1
*End Part
**
**
** ASSEMBLY
**
*Assembly, name=Assembly
**
*Instance, name=Part-1-1, part=Part-1
          0.,           0.,           0.
          0.,           0.,           0., -1.00000001268805,           0.,           0., 89.9999992730282
*End Instance
**
*Instance, name=Part-3-1, part=Part-3
          0.,      0.01632,           0.
          0.,      0.01632,           0., -1.00000001268805,      0.01632,           0., 89.9999992730282
*End Instance
**
*Instance, name=die-1, part=die
          0.,      0.00716,           0.
*End Instance
**
*Instance, name=Part-3-2, part=Part-3
          0.,           0.,           0.
          0.,           0.,           0., -1.00000001268805,           0.,           0., 89.9999992730282
*End Instance
**
*Nset, nset=Set-1, instance=Part-3-1
 305,
*Nset, nset=_PickedSet15, internal, instance=Part-1-1
    1,    2,    5,    6,   17,   18
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*Elset, elset=_PickedSet15, internal, instance=Part-1-1
    1,    2,    3,    4,    5,    6
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*Nset, nset=_PickedSet16, internal, instance=Part-1-1
    1,    2,    3,    4,    9,   10
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*Elset, elset=_PickedSet16, internal, instance=Part-1-1
    1,    2,    3,    4,    5,    6
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*Nset, nset=_PickedSet17, internal, instance=die-1
 2323,
*Nset, nset=_PickedSet18, internal, instance=Part-3-2
 305,
*Nset, nset=_PickedSet19, internal, instance=Part-3-1
 305,
*Elset, elset=_made_S2, internal, instance=Part-1-1
    1,    2,    3,    4,    5,    6
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*Elset, elset=_made_S4, internal, instance=Part-1-1
   16,   32,   48,   64,   80,   96
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*Elset, elset=_made_S3, internal, instance=Part-1-1
    1,    2,    3,    4,    5,    6
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*Surface, type=ELEMENT, name=made
_made_S2, S2
_made_S4, S4
_made_S3, S3
*Elset, elset=__PickedSurf10_SNEG, internal, instance=die-1, generate
    1,  2210,     1
*Surface, type=ELEMENT, name=_PickedSurf10, internal
__PickedSurf10_SNEG, SNEG
*Elset, elset=__PickedSurf13_SNEG, internal, instance=Part-3-1, generate
   1,  273,    1
*Surface, type=ELEMENT, name=_PickedSurf13, internal
__PickedSurf13_SNEG, SNEG
*Elset, elset=__PickedSurf14_SPOS, internal, instance=Part-3-2, generate
   1,  273,    1
*Surface, type=ELEMENT, name=_PickedSurf14, internal
__PickedSurf14_SPOS, SPOS
*Rigid Body, ref node=Part-3-1.Part-3-RefPt_, elset=Part-3-1.Part-3
*Rigid Body, ref node=die-1.die-RefPt_, elset=die-1.die
*Rigid Body, ref node=Part-3-2.Part-3-RefPt_, elset=Part-3-2.Part-3
*End Assembly
**
** MATERIALS
**
*Material, name=Material-Ref
*Cap Plasticity, dependencies=1
     24180.7,  71.1155, 0.381106,       0.,     0.02,       1., ,     0.42
     35786.3,  71.1015, 0.384638,       0.,     0.02,       1., ,     0.45
      52962.,  71.0824, 0.388571,       0.,     0.02,       1., ,     0.48
     78381.3,  71.0569, 0.392952,       0.,     0.02,       1., ,     0.51
     116001.,  71.0235, 0.397829,       0.,     0.02,       1., ,     0.54
     171675.,  70.9803, 0.403261,       0.,     0.02,       1., ,     0.57
     254071.,  70.9253, 0.409309,       0.,     0.02,       1., ,      0.6
     376013.,  70.8559, 0.416044,       0.,     0.02,       1., ,     0.63
     556482.,  70.7696, 0.423544,       0.,     0.02,       1., ,     0.66
     823567.,  70.6631, 0.431896,       0.,     0.02,       1., ,     0.69
 1.21884e+06,  70.5329, 0.441196,       0.,     0.02,       1., ,     0.72
 1.80383e+06,  70.3752, 0.451552,       0.,     0.02,       1., ,     0.75
 2.66958e+06,  70.1855, 0.463084,       0.,     0.02,       1., ,     0.78
 3.95085e+06,  69.9589, 0.475926,       0.,     0.02,       1., ,     0.81
 5.84706e+06,  69.6902, 0.490226,       0.,     0.02,       1., ,     0.84
 8.65338e+06,  69.3733,  0.50615,       0.,     0.02,       1., ,     0.87
 1.28066e+07,  69.0017, 0.523883,       0.,     0.02,       1., ,      0.9
*Cap Hardening
     433300.,       0.
 1.93878e+07, 0.350909
  2.7551e+07,     0.42
 3.77551e+07, 0.470909
 4.59184e+07, 0.503636
 5.91837e+07, 0.554545
 6.02041e+07, 0.558182
 6.83673e+07, 0.589091
  7.7551e+07, 0.616364
 8.36735e+07, 0.645455
 9.18367e+07, 0.665455
  1.0102e+08, 0.681818
 1.11224e+08, 0.710909
 1.26531e+08, 0.732727
 1.46939e+08, 0.770909
  1.7551e+08, 0.781818
 2.16327e+08, 0.794545
*Depvar
      1,
*Elastic, dependencies=1
 1.07586e+09, 0.0677116, ,      0.42
 1.25995e+09, 0.0702767, ,      0.45
  1.5029e+09, 0.0730828, ,      0.48
 1.82351e+09, 0.0761527, ,      0.51
 2.24662e+09,  0.079511, ,      0.54
 2.80499e+09, 0.0831851, ,      0.57
 3.54187e+09, 0.0872044, ,       0.6
 4.51432e+09, 0.0916015, ,      0.63
 5.79765e+09, 0.0964119, ,      0.66
 7.49124e+09,  0.101674, ,      0.69
 9.72625e+09,  0.107431, ,      0.72
 1.26758e+10,   0.11373, ,      0.75
 1.65682e+10,   0.12062, ,      0.78
  2.1705e+10,  0.128157, ,      0.81
  2.8484e+10,  0.136404, ,      0.84
 3.74301e+10,  0.145425, ,      0.87
 4.92362e+10,  0.155294, ,       0.9
*User Defined Field
*Material, name=Material-test
*Cap Plasticity
353976.,  70.8676, 0.414959,       0.,     0.02,       1.
*Cap Hardening
     433300.,       0.
 1.93878e+08, 0.350909
  2.7551e+08,     0.42
 3.77551e+08, 0.470909
 4.59184e+08, 0.503636
 5.91837e+08, 0.554545
 6.02041e+08, 0.558182
 6.83673e+08, 0.589091
  7.7551e+08, 0.616364
 8.36735e+08, 0.645455
 9.18367e+08, 0.665455
  1.0102e+09, 0.681818
 1.11224e+09, 0.710909
 1.26531e+09, 0.732727
 1.46939e+09, 0.770909
  1.7551e+09, 0.781818
 2.16327e+09, 0.794545
*Elastic
 4.35e+09, 0.0908981
*User Defined Field
**
** INTERACTION PROPERTIES
**
*Surface Interaction, name=IntProp-1
1.,
*Friction, slip tolerance=0.005
 0.08,
*Surface Behavior, pressure-overclosure=HARD
**
** BOUNDARY CONDITIONS
**
** Name: BC-1 Type: Symmetry/Antisymmetry/Encastre
*Boundary
_PickedSet15, ZSYMM
** Name: BC-2 Type: Symmetry/Antisymmetry/Encastre
*Boundary
_PickedSet16, XSYMM
** Name: BC-3 Type: Symmetry/Antisymmetry/Encastre
*Boundary
_PickedSet17, ENCASTRE
** Name: BC-4 Type: Symmetry/Antisymmetry/Encastre
*Boundary
_PickedSet18, ENCASTRE
** Name: BC-5 Type: Displacement/Rotation
*Boundary
_PickedSet19, 1, 1
_PickedSet19, 3, 3
_PickedSet19, 4, 4
_PickedSet19, 5, 5
_PickedSet19, 6, 6
**
** INTERACTIONS
**
** Interaction: Int-1
*Contact Pair, interaction=IntProp-1, type=SURFACE TO SURFACE
made, _PickedSurf10
** Interaction: Int-2
*Contact Pair, interaction=IntProp-1, type=SURFACE TO SURFACE
made, _PickedSurf13
** Interaction: Int-3
*Contact Pair, interaction=IntProp-1, type=SURFACE TO SURFACE
made, _PickedSurf14
** ----------------------------------------------------------------
**
** STEP: Loading
**
*Step, name=Loading, nlgeom=YES, inc=1000
*Static
0.01, 1., 1e-10, 0.05
**
** BOUNDARY CONDITIONS
**
** Name: BC-5 Type: Displacement/Rotation
*Boundary
_PickedSet19, 2, 2, -0.0087264
**
** CONTROLS
**
*Controls, reset
*Controls, parameters=time incrementation
, , , , , , , 20, , ,
0.8, 0.8, , , 0.8, 0.8, ,
**
** OUTPUT REQUESTS
**
*Restart, write, frequency=0
**
** FIELD OUTPUT: F-Output-1
**
*Output, field
*Node Output
RF, U
*Element Output, directions=YES
E, FV, PE, PEQC, S, PEEQ
**
** HISTORY OUTPUT: H-Output-3
**
*Output, history
*Contact Output, master=_PickedSurf13, slave=made
CFN2,
**
** HISTORY OUTPUT: H-Output-2
**
*Node Output, nset=Set-1
RF2, U2
*End Step
** ----------------------------------------------------------------
**
** STEP: Unloading
**
*Step, name=Unloading, nlgeom=YES
*Static
0.001, 1., 1e-20, 1.
**
** BOUNDARY CONDITIONS
**
** Name: BC-5 Type: Displacement/Rotation
*Boundary
_PickedSet19, 2, 2
**
** OUTPUT REQUESTS
**
*Restart, write, frequency=0
**
** FIELD OUTPUT: F-Output-1
**
*Output, field
*Node Output
RF, U
*Element Output, directions=YES
E, FV, PE, PEQC, S, PEEQ
**
** HISTORY OUTPUT: H-Output-3
**
*Output, history
*Contact Output, master=_PickedSurf13, slave=made
CFN2,
**
** HISTORY OUTPUT: H-Output-2
**
*Node Output, nset=Set-1
RF2, U2
*End Step
