*Heading
** Job name: nadTest3 Model name: Model-1
** Generated by: Abaqus/CAE 2019
*Preprint, echo=NO, model=NO, history=NO, contact=NO
**
** PARTS
**
*Part, name=Part-1
*Node
      1,         -1.5,          3.5
      2,         -1.5,           3.
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*Element, type=CPE4R
   1,    1,    7,  803,  410
   2,    7,    8,  804,  803
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*Nset, nset=_PickedSet3, internal, generate
    1,  5362,     1
*Elset, elset=_PickedSet3, internal, generate
    1,  4966,     1
** Section: Section-1
*Solid Section, elset=_PickedSet3, material=Material-1
,
*End Part
**
**
** ASSEMBLY
**
*Assembly, name=Assembly
**
*Instance, name=Part-1-1, part=Part-1
*End Instance
**
*Nset, nset=Set-1, instance=Part-1-1
 1, 2
*Nset, nset=_PickedSet4, internal, instance=Part-1-1, generate
 3,  6,  1
*Nset, nset=_PickedSet5, internal, instance=Part-1-1
 1,
*Nset, nset=_PickedSet7, internal, instance=Part-1-1
 1,
*End Assembly
*Amplitude, name=Amp-1, definition=PERIODIC
1, 3141.59265358979,              0.,              0.
             0.,              1.
**
** MATERIALS
**
*Material, name=Material-1
*Density
8440.,
*Elastic
 2.07e+11, 0.3
**
** BOUNDARY CONDITIONS
**
** Name: BC-1 Type: Displacement/Rotation
*Boundary
_PickedSet4, 1, 1
_PickedSet4, 2, 2
_PickedSet4, 6, 6
** ----------------------------------------------------------------
**
** STEP: Step-1
**
*Step, name=Step-1, nlgeom=YES
*Dynamic, Explicit
, 0.001,, 5e-07
*Bulk Viscosity
0.06, 1.2
**
** BOUNDARY CONDITIONS
**
** Name: BC-2 Type: Displacement/Rotation
*Boundary, amplitude=Amp-1
_PickedSet7, 2, 2, -1e-06
**
** OUTPUT REQUESTS
**
*Restart, write, number interval=1, time marks=NO
**
** FIELD OUTPUT: F-Output-1
**
*Output, field
*Node Output
A, U, V
*Element Output, directions=YES
S,
**
** HISTORY OUTPUT: H-Output-1
**
*Output, history, time interval=5e-07
*Node Output, nset=Set-1
U1, U2
*End Step
